** CalculiX validation input for cantilever_hex8_medium
** Generated from the same structured mesh rules as validation_export.
*NODE, NSET=NALL
1, 0, 0, 0
2, 0.083333333333333329, 0, 0
3, 0.16666666666666666, 0, 0
4, 0.25, 0, 0
5, 0.33333333333333331, 0, 0
6, 0.41666666666666669, 0, 0
7, 0.5, 0, 0
8, 0.58333333333333337, 0, 0
9, 0.66666666666666663, 0, 0
10, 0.75, 0, 0
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*ELEMENT, TYPE=C3D8, ELSET=EALL
1, 1, 2, 15, 14, 66, 67, 80, 79
2, 2, 3, 16, 15, 67, 68, 81, 80
3, 3, 4, 17, 16, 68, 69, 82, 81
4, 4, 5, 18, 17, 69, 70, 83, 82
5, 5, 6, 19, 18, 70, 71, 84, 83
6, 6, 7, 20, 19, 71, 72, 85, 84
7, 7, 8, 21, 20, 72, 73, 86, 85
8, 8, 9, 22, 21, 73, 74, 87, 86
9, 9, 10, 23, 22, 74, 75, 88, 87
10, 10, 11, 24, 23, 75, 76, 89, 88
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*MATERIAL, NAME=MAT1
*ELASTIC
1, 0.29999999999999999
*SOLID SECTION, ELSET=EALL, MATERIAL=MAT1
*BOUNDARY
1, 1, 3, 0.0
14, 1, 3, 0.0
27, 1, 3, 0.0
40, 1, 3, 0.0
53, 1, 3, 0.0
66, 1, 3, 0.0
79, 1, 3, 0.0
92, 1, 3, 0.0
105, 1, 3, 0.0
118, 1, 3, 0.0
131, 1, 3, 0.0
144, 1, 3, 0.0
157, 1, 3, 0.0
170, 1, 3, 0.0
183, 1, 3, 0.0
196, 1, 3, 0.0
209, 1, 3, 0.0
222, 1, 3, 0.0
235, 1, 3, 0.0
248, 1, 3, 0.0
261, 1, 3, 0.0
274, 1, 3, 0.0
287, 1, 3, 0.0
300, 1, 3, 0.0
313, 1, 3, 0.0
*STEP
*STATIC
*CLOAD
13, 3, -0.040000000000000001
26, 3, -0.040000000000000001
39, 3, -0.040000000000000001
52, 3, -0.040000000000000001
65, 3, -0.040000000000000001
78, 3, -0.040000000000000001
91, 3, -0.040000000000000001
104, 3, -0.040000000000000001
117, 3, -0.040000000000000001
130, 3, -0.040000000000000001
143, 3, -0.040000000000000001
156, 3, -0.040000000000000001
169, 3, -0.040000000000000001
182, 3, -0.040000000000000001
195, 3, -0.040000000000000001
208, 3, -0.040000000000000001
221, 3, -0.040000000000000001
234, 3, -0.040000000000000001
247, 3, -0.040000000000000001
260, 3, -0.040000000000000001
273, 3, -0.040000000000000001
286, 3, -0.040000000000000001
299, 3, -0.040000000000000001
312, 3, -0.040000000000000001
325, 3, -0.040000000000000001
*NODE PRINT, NSET=NALL
U
*NODE FILE, NSET=NALL
U
*END STEP
