** CalculiX validation input for cantilever_tet4_small
** Generated from the same structured mesh rules as validation_export.
*NODE, NSET=NALL
1, 0, 0, 0
2, 0.5, 0, 0
3, 1, 0, 0
4, 0, 0.10000000000000001, 0
5, 0.5, 0.10000000000000001, 0
6, 1, 0.10000000000000001, 0
7, 0, 0.20000000000000001, 0
8, 0.5, 0.20000000000000001, 0
9, 1, 0.20000000000000001, 0
10, 0, 0, 0.050000000000000003
11, 0.5, 0, 0.050000000000000003
12, 1, 0, 0.050000000000000003
13, 0, 0.10000000000000001, 0.050000000000000003
14, 0.5, 0.10000000000000001, 0.050000000000000003
15, 1, 0.10000000000000001, 0.050000000000000003
16, 0, 0.20000000000000001, 0.050000000000000003
17, 0.5, 0.20000000000000001, 0.050000000000000003
18, 1, 0.20000000000000001, 0.050000000000000003
19, 0, 0, 0.10000000000000001
20, 0.5, 0, 0.10000000000000001
21, 1, 0, 0.10000000000000001
22, 0, 0.10000000000000001, 0.10000000000000001
23, 0.5, 0.10000000000000001, 0.10000000000000001
24, 1, 0.10000000000000001, 0.10000000000000001
25, 0, 0.20000000000000001, 0.10000000000000001
26, 0.5, 0.20000000000000001, 0.10000000000000001
27, 1, 0.20000000000000001, 0.10000000000000001
*ELEMENT, TYPE=C3D4, ELSET=EALL
1, 1, 2, 5, 14
2, 1, 5, 4, 14
3, 1, 4, 13, 14
4, 1, 13, 10, 14
5, 1, 10, 11, 14
6, 1, 11, 2, 14
7, 2, 3, 6, 15
8, 2, 6, 5, 15
9, 2, 5, 14, 15
10, 2, 14, 11, 15
11, 2, 11, 12, 15
12, 2, 12, 3, 15
13, 4, 5, 8, 17
14, 4, 8, 7, 17
15, 4, 7, 16, 17
16, 4, 16, 13, 17
17, 4, 13, 14, 17
18, 4, 14, 5, 17
19, 5, 6, 9, 18
20, 5, 9, 8, 18
21, 5, 8, 17, 18
22, 5, 17, 14, 18
23, 5, 14, 15, 18
24, 5, 15, 6, 18
25, 10, 11, 14, 23
26, 10, 14, 13, 23
27, 10, 13, 22, 23
28, 10, 22, 19, 23
29, 10, 19, 20, 23
30, 10, 20, 11, 23
31, 11, 12, 15, 24
32, 11, 15, 14, 24
33, 11, 14, 23, 24
34, 11, 23, 20, 24
35, 11, 20, 21, 24
36, 11, 21, 12, 24
37, 13, 14, 17, 26
38, 13, 17, 16, 26
39, 13, 16, 25, 26
40, 13, 25, 22, 26
41, 13, 22, 23, 26
42, 13, 23, 14, 26
43, 14, 15, 18, 27
44, 14, 18, 17, 27
45, 14, 17, 26, 27
46, 14, 26, 23, 27
47, 14, 23, 24, 27
48, 14, 24, 15, 27
*MATERIAL, NAME=MAT1
*ELASTIC
1, 0.29999999999999999
*SOLID SECTION, ELSET=EALL, MATERIAL=MAT1
*BOUNDARY
1, 1, 3, 0.0
4, 1, 3, 0.0
7, 1, 3, 0.0
10, 1, 3, 0.0
13, 1, 3, 0.0
16, 1, 3, 0.0
19, 1, 3, 0.0
22, 1, 3, 0.0
25, 1, 3, 0.0
*STEP
*STATIC
*CLOAD
3, 3, -0.1111111111111111
6, 3, -0.1111111111111111
9, 3, -0.1111111111111111
12, 3, -0.1111111111111111
15, 3, -0.1111111111111111
18, 3, -0.1111111111111111
21, 3, -0.1111111111111111
24, 3, -0.1111111111111111
27, 3, -0.1111111111111111
*NODE PRINT, NSET=NALL
U
*NODE FILE, NSET=NALL
U
*END STEP
