// COMSOL Multiphysics 6.2.0.339 model "cantilever_tet4_medium_comsol_reference.mph"
// Outline of the model tree

Geometry
  geom1 "几何 1" (3D, length unit m)

Materials
  mat1: Common "材料 1" on all domains
    Enu "杨氏模量和泊松比"
      E = 1
      nu = 0.3

Physics
  solid: SolidMechanics "固体力学" on all domains
    dependent variable u = {u, v, w}
    ShapeProperty.order_displacement = 1
    lemm1: LinearElasticModel "线弹性材料 1" (default)
    free1: Free "自由 1" (default)
    init1: init "初始值 1" (default)
    fix1: Fixed "固定约束 1" on boundaries 6
    bndl1: BoundaryLoad "边界载荷 1" on boundaries 5 | LoadType = ForceArea; FperArea = {0, 0, -50}

Mesh
  mesh1 "网格 1"

Studies
  std1 "研究 1"
    stat: Stationary "稳态"

Solver configurations
  sol1 "解 1" (study std1)
    v1: Variables "因变量 1"
    s1: Stationary "稳态求解器 1"
      fc1: FullyCoupled "全耦合 1"
      d1: Direct "建议的直接求解器 (solid)"

Datasets
  dset1: Solution | solution = sol1