*Heading
** Generated from validation_export case cantilever_hex8_medium.
** Node labels are C++ 0-based node indices plus one.
** Element formulation: C3D8 full integration, not C3D8R.
*Preprint, echo=NO, model=NO, history=NO, contact=NO
*Node
1, 0, 0, 0
2, 0.083333333333333329, 0, 0
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*Element, type=C3D8, elset=EALL
1, 1, 2, 15, 14, 66, 67, 80, 79
2, 2, 3, 16, 15, 67, 68, 81, 80
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*Nset, nset=FIXED
1, 14, 27, 40, 53, 66
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*Nset, nset=LOADED
13, 26, 39, 52, 65, 78
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*Nset, nset=PROBES
169, 163, 157
*Material, name=MAT_LINEAR_ELASTIC
*Elastic
1, 0.29999999999999999
*Solid Section, elset=EALL, material=MAT_LINEAR_ELASTIC
,
*Boundary
FIXED, 1, 3, 0.
*Step, name=StaticStep, nlgeom=NO
*Static
1., 1., 1e-05, 1.
*Cload
13, 3, -0.040000000000000001
26, 3, -0.040000000000000001
39, 3, -0.040000000000000001
52, 3, -0.040000000000000001
65, 3, -0.040000000000000001
78, 3, -0.040000000000000001
91, 3, -0.040000000000000001
104, 3, -0.040000000000000001
117, 3, -0.040000000000000001
130, 3, -0.040000000000000001
143, 3, -0.040000000000000001
156, 3, -0.040000000000000001
169, 3, -0.040000000000000001
182, 3, -0.040000000000000001
195, 3, -0.040000000000000001
208, 3, -0.040000000000000001
221, 3, -0.040000000000000001
234, 3, -0.040000000000000001
247, 3, -0.040000000000000001
260, 3, -0.040000000000000001
273, 3, -0.040000000000000001
286, 3, -0.040000000000000001
299, 3, -0.040000000000000001
312, 3, -0.040000000000000001
325, 3, -0.040000000000000001
*Output, field
*Node Output, nset=PROBES
U
*End Step
